*Heading
** Job name: Job-DEAD-LIVE-TOTAL Model name: Model-1-prebystep
** Generated by: Abaqus/CAE 6.12-1
*Preprint, echo=NO, model=NO, history=NO, contact=NO
**
** PARTS
**
*Part, name=longgu
*Node
      1,   1312.26758,   2567.57715,           0.
      2,   1317.52246,   2569.08496,           0.
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*Element, type=B31
1, 1, 2
 2,   2, 580
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*Nset, nset=Set-longgu, generate
    1,  2127,     1
*Elset, elset=Set-longgu, generate
    1,  2151,     1
*Nset, nset=sub_triangle
    2,    3,   28,   29,   56,   57
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*Elset, elset=sub_triangle
    2,    3,    4,    5,    6,    7
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*Nset, nset=sub_genetrix, generate
   1,  579,    1
*Elset, elset=sub_genetrix
    1,   49,   50,   51,   52,   53
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*Nset, nset=gen_z
   1,   2,  29,  30,  31,  32
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*Elset, elset=gen_z
    1,  139,  140,  141,  142,  143
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*Nset, nset=gen_x1
 190, 191, 192, 193, 194, 195
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*Elset, elset=gen_x1
  711,  712,  713,  714,  715,  716
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*Nset, nset=gen_x2
   3,   4,   5,   6,   7,   8
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*Elset, elset=gen_x2
   49,   50,   51,   52,   53,   54
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** Region: (S-genetrix:sub_genetrix), (Beam Orientation:gen_z)
*Elset, elset=_I1, internal
    1,  139,  140,  141,  142,  143
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** Section: S-genetrix  Profile: P-genetrix
*Beam Section, elset=_I1, material=M-longgu, temperature=GRADIENTS, section=CIRC
2.
0.,0.,-1.
** Section: S-triangle  Profile: P-triangle
*Beam Section, elset=sub_triangle, material=M-longgu, temperature=GRADIENTS, section=CIRC
1.5
1.,0.,0.
** Region: (S-genetrix:sub_genetrix), (Beam Orientation:gen_x2)
*Elset, elset=_I3, internal
   49,   50,   51,   52,   53,   54
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** Section: S-genetrix  Profile: P-genetrix
*Beam Section, elset=_I3, material=M-longgu, temperature=GRADIENTS, section=CIRC
2.
0.,1.732,1.
** Region: (S-genetrix:sub_genetrix), (Beam Orientation:gen_x1)
*Elset, elset=_I4, internal
  711,  712,  713,  714,  715,  716
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** Section: S-genetrix  Profile: P-genetrix
*Beam Section, elset=_I4, material=M-longgu, temperature=GRADIENTS, section=CIRC
2.
0.,1.732,-1.
*End Part
**
*Part, name=thread1
*Node
      1,   1167.52246,   2338.90161,    95.894104
      2,   1317.52246,   2306.85669,  -151.397598
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*Element, type=T3D2
1, 1, 2
2, 2, 3
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*Nset, nset=Set-thread1, generate
  1,  13,   1
*Elset, elset=Set-thread1, generate
  1,  16,   1
** Section: S-thread
*Solid Section, elset=Set-thread1, material=M-thread
0.1257,
*End Part
**
*Part, name=thread2
*Node
      1,   1167.52246,   2504.99512,           0.
      2,   1317.52246,   2306.85669,   151.397598
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*Element, type=T3D2
1, 1, 2
2, 2, 3
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*Nset, nset=Set-thread2, generate
  1,  13,   1
*Elset, elset=Set-thread2, generate
  1,  16,   1
** Section: S-thread
*Solid Section, elset=Set-thread2, material=M-thread
0.1257,
*End Part
**
*Part, name=thread3
*Node
      1,   1167.52246,   2338.90161,   -95.894104
      2,   1317.52246,   2306.85669,   151.397598
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*Element, type=T3D2
1, 1, 2
2, 2, 3
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*Nset, nset=Set-thread3, generate
  1,  13,   1
*Elset, elset=Set-thread3, generate
  1,  16,   1
** Section: S-thread
*Solid Section, elset=Set-thread3, material=M-thread
0.1257,
*End Part
**
**
** ASSEMBLY
**
*Assembly, name=Assembly
**
*Instance, name=longgu-1, part=longgu
*End Instance
**
*Instance, name=thread1-1, part=thread1
*End Instance
**
*Instance, name=thread2-1, part=thread2
*End Instance
**
*Instance, name=thread3-1, part=thread3
*End Instance
**
*Nset, nset=tie_master, instance=longgu-1
   2,   3,  28,  29,  56,  57
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*Nset, nset=tie_slave, instance=thread1-1, generate
  1,  13,   1
*Nset, nset=tie_slave, instance=thread2-1, generate
  1,  13,   1
*Nset, nset=tie_slave, instance=thread3-1, generate
  1,  13,   1
*Nset, nset=PT-1, instance=thread1-1, generate
 11,  13,   1
*Nset, nset=PT-1, instance=thread2-1, generate
 11,  13,   1
*Nset, nset=PT-1, instance=thread3-1, generate
 11,  13,   1
*Elset, elset=PT-1, instance=thread1-1
 15, 16
*Elset, elset=PT-1, instance=thread2-1
 15, 16
*Elset, elset=PT-1, instance=thread3-1
 15, 16
*Nset, nset=PT-2, instance=thread1-1
  9, 11, 12
*Nset, nset=PT-2, instance=thread2-1
  9, 11, 12
*Nset, nset=PT-2, instance=thread3-1
  9, 11, 12
*Elset, elset=PT-2, instance=thread1-1
 13, 14
*Elset, elset=PT-2, instance=thread2-1
 13, 14
*Elset, elset=PT-2, instance=thread3-1
 13, 14
*Nset, nset=PT-3, instance=thread1-1, generate
  8,  10,   1
*Nset, nset=PT-3, instance=thread2-1, generate
  8,  10,   1
*Nset, nset=PT-3, instance=thread3-1, generate
  8,  10,   1
*Elset, elset=PT-3, instance=thread1-1
  9, 10
*Elset, elset=PT-3, instance=thread2-1
  9, 10
*Elset, elset=PT-3, instance=thread3-1
  9, 10
*Nset, nset=PT-4, instance=thread1-1
  7,  8, 10
*Nset, nset=PT-4, instance=thread2-1
  7,  8, 10
*Nset, nset=PT-4, instance=thread3-1
  7,  8, 10
*Elset, elset=PT-4, instance=thread1-1
  8, 11
*Elset, elset=PT-4, instance=thread2-1
  8, 11
*Elset, elset=PT-4, instance=thread3-1
  8, 11
*Nset, nset=PT-5, instance=thread1-1, generate
 5,  7,  1
*Nset, nset=PT-5, instance=thread2-1, generate
 5,  7,  1
*Nset, nset=PT-5, instance=thread3-1, generate
 5,  7,  1
*Elset, elset=PT-5, instance=thread1-1
  7, 12
*Elset, elset=PT-5, instance=thread2-1
  7, 12
*Elset, elset=PT-5, instance=thread3-1
  7, 12
*Nset, nset=PT-6, instance=thread1-1
 3, 5, 6
*Nset, nset=PT-6, instance=thread2-1
 3, 5, 6
*Nset, nset=PT-6, instance=thread3-1
 3, 5, 6
*Elset, elset=PT-6, instance=thread1-1
 5, 6
*Elset, elset=PT-6, instance=thread2-1
 5, 6
*Elset, elset=PT-6, instance=thread3-1
 5, 6
*Nset, nset=PT-7, instance=thread1-1, generate
 2,  4,  1
*Nset, nset=PT-7, instance=thread2-1, generate
 2,  4,  1
*Nset, nset=PT-7, instance=thread3-1, generate
 2,  4,  1
*Elset, elset=PT-7, instance=thread1-1
 2, 3
*Elset, elset=PT-7, instance=thread2-1
 2, 3
*Elset, elset=PT-7, instance=thread3-1
 2, 3
*Nset, nset=PT-8, instance=thread1-1
 1, 2, 4
*Nset, nset=PT-8, instance=thread2-1
 1, 2, 4
*Nset, nset=PT-8, instance=thread3-1
 1, 2, 4
*Elset, elset=PT-8, instance=thread1-1
 1, 4
*Elset, elset=PT-8, instance=thread2-1
 1, 4
*Elset, elset=PT-8, instance=thread3-1
 1, 4
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*Nset, nset=pBoundary, instance=longgu-1, generate
 188,  190,    1
*Nset, nset=pt_step2, instance=longgu-1
 148, 149, 406
*Surface, type=NODE, name=tie_master_CNS_, internal
tie_master, 1.
*Surface, type=NODE, name=tie_slave_CNS_, internal
tie_slave, 1.
** Constraint: Constraint-1
*Tie, name=Constraint-1, adjust=yes, position tolerance=0.01, no rotation
tie_slave_CNS_, tie_master_CNS_
*End Assembly
**
** MATERIALS
**
*Material, name=M-longgu
*Density
 1.415e-09,
*Elastic
118000., 0.3
*Material, name=M-thread
*Density
 7.8e-09,
*Elastic
45364., 0.25
*No Compression
*Expansion
 1e-05,
**
** BOUNDARY CONDITIONS
**
** Name: Fix_1 Type: 位移/转角
*Boundary
pBoundary, 1, 1
pBoundary, 2, 2
pBoundary, 3, 3
**
** PREDEFINED FIELDS
**
** Name: PF-1   Type: Temperature
*Initial Conditions, type=TEMPERATURE
PT-1, 0.
** Name: PF-2   Type: Temperature
*Initial Conditions, type=TEMPERATURE
PT-2, 0.
** Name: PF-3   Type: Temperature
*Initial Conditions, type=TEMPERATURE
PT-3, 0.
** Name: PF-4   Type: Temperature
*Initial Conditions, type=TEMPERATURE
PT-4, 0.
** Name: PF-5   Type: Temperature
*Initial Conditions, type=TEMPERATURE
PT-5, 0.
** Name: PF-6   Type: Temperature
*Initial Conditions, type=TEMPERATURE
PT-6, 0.
** Name: PF-7   Type: Temperature
*Initial Conditions, type=TEMPERATURE
PT-7, 0.
** Name: PF-8   Type: Temperature
*Initial Conditions, type=TEMPERATURE
PT-8, 0.
** ----------------------------------------------------------------
**
** STEP: pre
**
*Step, name=pre, nlgeom=YES, inc=1500
*Static
0.01, 1., 1e-08, 1.
**
** LOADS
**
** Name: G_load1   Type: Gravity
*Dload
, GRAV, 9870., -1., 0., 0.
**
** PREDEFINED FIELDS
**
** Name: PF-1   Type: Temperature
*Temperature
PT-1, -134.553
**
** OUTPUT REQUESTS
**
*Restart, write, frequency=0
*Output, field, frequency=0
*Output, history, frequency=0
*model change, remove
PT-2
*model change, remove
PT-3
*model change, remove
PT-4
*model change, remove
PT-5
*model change, remove
PT-6
*model change, remove
PT-7
*model change, remove
PT-8
*End Step
** ----------------------------------------------------------------
**
** STEP: pre-2
**
*Step, name=pre-2, nlgeom=YES, inc=1500
*Static
0.01, 1., 1e-08, 1.
**
** PREDEFINED FIELDS
**
** Name: PF-2   Type: Temperature
*Temperature
PT-2, -220.656
**
** OUTPUT REQUESTS
**
*Restart, write, frequency=0
*Output, field, frequency=0
*Output, history, frequency=0
*model change, add
PT-2
*End Step
** ----------------------------------------------------------------
**
** STEP: pre-3
**
*Step, name=pre-3, nlgeom=YES, inc=1500
*Static
0.01, 1., 1e-08, 1.
**
** PREDEFINED FIELDS
**
** Name: PF-3   Type: Temperature
*Temperature
PT-3, -270.381
**
** OUTPUT REQUESTS
**
*Restart, write, frequency=0
*Output, field, frequency=0
*Output, history, frequency=0
*model change, add
PT-3
*End Step
** ----------------------------------------------------------------
**
** STEP: pre-4
**
*Step, name=pre-4, nlgeom=YES, inc=1500
*Static
0.01, 1., 1e-08, 1.
**
** PREDEFINED FIELDS
**
** Name: PF-4   Type: Temperature
*Temperature
PT-4, -304.899
**
** OUTPUT REQUESTS
**
*Restart, write, frequency=0
*Output, field, frequency=0
*Output, history, frequency=0
*model change, add
PT-4
*End Step
** ----------------------------------------------------------------
**
** STEP: pre-5
**
*Step, name=pre-5, nlgeom=YES, inc=1500
*Static
0.01, 1., 1e-08, 1.
**
** PREDEFINED FIELDS
**
** Name: PF-5   Type: Temperature
*Temperature
PT-5, -320.239
**
** OUTPUT REQUESTS
**
*Restart, write, frequency=0
*Output, field, frequency=0
*Output, history, frequency=0
*model change, add
PT-5
*End Step
** ----------------------------------------------------------------
**
** STEP: pre-6
**
*Step, name=pre-6, nlgeom=YES, inc=1500
*Static
0.01, 1., 1e-08, 1.
**
** PREDEFINED FIELDS
**
** Name: PF-6   Type: Temperature
*Temperature
PT-6, -334.075
**
** OUTPUT REQUESTS
**
*Restart, write, frequency=0
*Output, field, frequency=0
*Output, history, frequency=0
*model change, add
PT-6
*End Step
** ----------------------------------------------------------------
**
** STEP: pre-7
**
*Step, name=pre-7, nlgeom=YES, inc=1500
*Static
0.01, 1., 1e-08, 1.
**
** PREDEFINED FIELDS
**
** Name: PF-7   Type: Temperature
*Temperature
PT-7, -339.458
**
** OUTPUT REQUESTS
**
*Restart, write, frequency=0
**
** FIELD OUTPUT: F-Output-1
**
*Output, field, frequency=99999
*Element Output, directions=YES
S,
**
** HISTORY OUTPUT: H-Output-1
**
*Output, history, frequency=99999
*Energy Output
ETOTAL,
*model change, add
PT-7
*End Step
** ----------------------------------------------------------------
**
** STEP: pre-8
**
*Step, name=pre-8, nlgeom=YES, inc=1500
*Static
0.01, 1., 1e-08, 1.
**
** PREDEFINED FIELDS
**
** Name: PF-8   Type: Temperature
*Temperature
PT-8, -172.13645754342653
**
** OUTPUT REQUESTS
**
*Restart, write, frequency=0
**
** FIELD OUTPUT: F-Output-1
**
*Output, field, frequency=99999
*Element Output, directions=YES
S,
**
** HISTORY OUTPUT: H-Output-1
**
*Output, history, frequency=99999
*Energy Output
ETOTAL,
*model change, add
PT-8
*End Step
