*Heading
** Job name: mini Model name: SMPC-warp-mini
** Generated by: Abaqus/CAE 2016
*Preprint, echo=NO, model=NO, history=NO, contact=NO
**
** PARTS
**
*Part, name=Part-1
*Node
      1,          -6.,         -1.5,  0.699999988
      2,          -6.,          -1.,  0.699999988
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*Element, type=C3D8
  1,  36,  37,  44,  43,   1,   2,   9,   8
  2,  37,  38,  45,  44,   2,   3,  10,   9
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*Nset, nset=Set-15, generate
   1,  875,    1
*Elset, elset=Set-15, generate
   1,  576,    1
*Orientation, name=Ori-3
          1.,           0.,           0.,           0.,           1.,           0.
3, 0.
** Section: Section-1
*Solid Section, elset=Set-15, orientation=Ori-3, material=Material-1
,
*End Part
**
**
** ASSEMBLY
**
*Assembly, name=Assembly
**
*Instance, name=Part-1-1, part=Part-1
*End Instance
**
*Node
      1,          -6.,           0.,  0.349999994
*Node
      2,           6.,           0.,  0.349999994
*Nset, nset=C1
 2,
*Nset, nset=C2
 1,
*Nset, nset=M1
 2,
*Nset, nset=M2
 1,
*Nset, nset=s_Set-8, instance=Part-1-1, generate
 841,  875,    1
*Elset, elset=s_Set-8, instance=Part-1-1, generate
 553,  576,    1
*Nset, nset=s_Set-9, instance=Part-1-1, generate
  1,  35,   1
*Elset, elset=s_Set-9, instance=Part-1-1, generate
  1,  24,   1
*Elset, elset=_SA1_S1, internal, instance=Part-1-1, generate
 553,  576,    1
*Surface, type=ELEMENT, name=SA1
_SA1_S1, S1
*Elset, elset=_SA2_S2, internal, instance=Part-1-1, generate
  1,  24,   1
*Surface, type=ELEMENT, name=SA2
_SA2_S2, S2
*Surface, type=NODE, name=s_Set-8_CNS_, internal
s_Set-8, 1.
*Surface, type=NODE, name=s_Set-9_CNS_, internal
s_Set-9, 1.
** Constraint: Constraint-1
*MPC
BEAM, s_Set-8, C1
** Constraint: Constraint-2
*MPC
BEAM, s_Set-9, M2
*End Assembly
*Amplitude, name=Amp-1
             0.,              0.,            108.,              1.
**
** MATERIALS
**
*Material, name=Material-1
*Anisotropic Hyperelastic, fung-orthotropic, moduli=INSTANTANEOUS
 7423.13,     1164.95,     7531.28,     1489.08,     1494.02,     3477.08,     843.964,     841.612
     1117.55,     4.82797, 9.73277e-05
*Viscoelastic, time=PRONY
 0.55473,      0., 28.2832
**
** BOUNDARY CONDITIONS
**
** Name: BC-1 Type: Displacement/Rotation
*Boundary
M2, 1, 1
M2, 2, 2
M2, 3, 3
M2, 4, 4
M2, 5, 5
M2, 6, 6
** ----------------------------------------------------------------
**
** STEP: Step-2
**
*Step, name=Step-2, nlgeom=YES, inc=100000
*Visco, cetol=1e-05
0.0001, 108., 1e-11, 4.
**
** BOUNDARY CONDITIONS
**
** Name: BC-2 Type: Displacement/Rotation
*Boundary, amplitude=Amp-1
M1, 1, 1, 0.18
**
** OUTPUT REQUESTS
**
*Restart, write, frequency=0
**
** FIELD OUTPUT: F-Output-1
**
*Output, field, time interval=6.
*Node Output
RF, U
*Element Output, directions=YES
LE, S
*Output, history, frequency=0
*End Step
